# OpenSim document version 40500
Model auto2020_hip_R:
  gravity: 0 -9.8081 0
  credits:
    Luca Modenese, Jean-Baptiste Renault 2020. Model created using the STAPLE (Shared Tools for Automatic Personalised Lower Extremity) modelling toolbox. GitHub page: https://github.com/modenaxe/msk-STAPLE.
  Ground
  BodySet:
    Body pelvis: mass=10.00475 [kg] mass_center=(-0.01617005 -0.03913989 0.06588387)
        inertia=(0.08733026 0.07399286 0.04918699 0 0 0) meshes=Geometry\pelvis_no_sacrum.obj
    Body femur_r: mass=7.90169 mass_center=(0.07422009 -0.02734397 -0.1668766)
        inertia=(0.1137502 0.02981802 0.1199517 0 0 0) meshes=Geometry\femur_r.obj
    Body tibia_r: mass=3.149581 mass_center=(0.06785537 -0.02472826 -0.5910366)
        inertia=(0.04281562 0.004332532 0.04341028 0 0 0) meshes=Geometry\tibia_r.obj
  JointSet:
    CustomJoint ground_pelvis: socket_parent_frame=ground_offset socket_child_frame=pelvis_offset
      Coordinate pelvis_tilt: range=(-1.570796 1.570796)
      Coordinate pelvis_list: range=(-1.570796 1.570796)
      Coordinate pelvis_rotation: range=(-1.570796 1.570796)
      Coordinate pelvis_tx: range=(-10 10)
      Coordinate pelvis_ty: range=(-10 10)
      Coordinate pelvis_tz: range=(-10 10)
      PhysicalOffsetFrame ground_offset: socket_parent=/ground translation=(0 0 0) [meters]
      PhysicalOffsetFrame pelvis_offset: socket_parent=/bodyset/pelvis translation=(-0.0135367 0.04223962 0.07582201)
          orientation=(0.1506225 1.505036 1.204845) [radians]
      SpatialTransform:
        TransformAxis rotation1: coordinates=pelvis_tilt axis=(0 0 1) LinearFunction(coefficients=1 0)
        TransformAxis rotation2: coordinates=pelvis_list axis=(1 0 0) LinearFunction(coefficients=1 0)
        TransformAxis rotation3: coordinates=pelvis_rotation axis=(0 1 0) LinearFunction(coefficients=1 0)
        TransformAxis translation1: coordinates=pelvis_tx axis=(1 0 0) LinearFunction(coefficients=1 0)
        TransformAxis translation2: coordinates=pelvis_ty axis=(0 1 0) LinearFunction(coefficients=1 0)
        TransformAxis translation3: coordinates=pelvis_tz axis=(0 0 1) LinearFunction(coefficients=1 0)
    CustomJoint hip_r: socket_parent_frame=pelvis_offset socket_child_frame=femur_r_offset
      Coordinate hip_flexion_r: range=(-2.094395 2.094395)
      Coordinate hip_adduction_r: range=(-2.094395 2.094395)
      Coordinate hip_rotation_r: range=(-2.094395 2.094395)
      PhysicalOffsetFrame pelvis_offset: socket_parent=/bodyset/pelvis translation=(0.08023619 -0.02664457 0.01836867)
          orientation=(0.1506225 1.505036 1.204845)
      PhysicalOffsetFrame femur_r_offset: socket_parent=/bodyset/femur_r
          translation=(0.08023619 -0.02664457 0.01836867) orientation=(-2.357085 1.524768 -2.35855)
      SpatialTransform: axes_held_at_zero=(translation1 translation2 translation3)
        TransformAxis rotation1: coordinates=hip_flexion_r axis=(0 0 1) LinearFunction(coefficients=1 0)
        TransformAxis rotation2: coordinates=hip_adduction_r axis=(1 0 0) LinearFunction(coefficients=1 0)
        TransformAxis rotation3: coordinates=hip_rotation_r axis=(0 1 0) LinearFunction(coefficients=1 0)
    CustomJoint knee_r: socket_parent_frame=femur_r_offset socket_child_frame=tibia_r_offset
      Coordinate knee_angle_r: range=(-2.094395 0.1745329)
      PhysicalOffsetFrame femur_r_offset: socket_parent=/bodyset/femur_r translation=(0.0663422 -0.02825982 -0.4094494)
          orientation=(-1.532135 1.53815 3.100237)
      PhysicalOffsetFrame tibia_r_offset: socket_parent=/bodyset/tibia_r translation=(0.0663422 -0.02825982 -0.4094494)
          orientation=(-2.918522 1.513865 -1.83223)
      SpatialTransform: axes_held_at_zero=(rotation2 rotation3 translation1 translation2 translation3)
        TransformAxis rotation1: coordinates=knee_angle_r axis=(0 0 1) LinearFunction(coefficients=1 0)
  MarkerSet:
    Marker RASI: pelvis (0.08546389 0.04126131 0.08226793)
    Marker LASI: pelvis (-0.1125373 0.04321793 0.0693761)
    Marker RPSI: pelvis (0.03255439 -0.1161442 0.1095264)
    Marker LPSI: pelvis (-0.06179701 -0.1112602 0.1104328)
    Marker SYMP: pelvis (-0.001811634 0.02048645 -0.0008561645)
    Marker RKNE: femur_r (0.1110169 -0.02444907 -0.4109345)
    Marker RMFC: femur_r (0.02102521 -0.02654081 -0.4057618)
    Marker RTRO: femur_r (0.145391 -0.03525885 -0.0256909)
    Marker RTTB: tibia_r (0.07737318 0.0152341 -0.472258)
    Marker RHFB: tibia_r (0.1214198 -0.04558284 -0.4726215)
    Marker RANK: tibia_r (0.0849203 -0.04741333 -0.8244829)
    Marker RMMA: tibia_r (0.02415973 -0.01833925 -0.8129268)
    Marker RLM: tibia_r (0.07403276 -0.05401113 -0.839514)
